// COMSOL Multiphysics 6.3.0.290 model "MMS2DtimedepPartition - MoltenSaltsFunge.mph"
// Outline of the model tree

Variables
  var1 "Variables 1"
    a = (2+cos(2*pi*x)*cos(2*pi*y))*t
    b = 8*pi^2*t*cos(2*pi*x)*cos(2*pi*y) + cos(2*pi*x)*cos(2*pi*y) + 2
    e = 160*pi^2*t^2*(cos(2*pi*x)*cos(2*pi*y) + 2)*cos(2*pi*x)*cos(2*pi*y) - 80*pi^2*t^2*sin(2*pi*x)^2*cos(2*pi*y)^2 - 80*pi^2*t^2*sin(2*pi*y)^2*cos(2*pi*x)^2 + 20*t*(cos(2*pi*x)*cos(2*pi*y) + 2)^2
  var2 "Variables 2" on domains 1
    c_flibe = c
  var3 "Variables 3" on boundaries 4, 5
    K = 10*c_flibe
  var4 "Variables 4" on domains 2
    c_flibe2 = c

Geometry
  geom1 "Geometry 1" (2D, length unit m)
    sq1: Square | base = center
    sq2: Square | size = 0.5
    fin: Finalize "Form Union"

Physics
  tds: DilutedSpecies "Transport of Diluted Species" on all domains
    dependent variable c
    ShapeProperty.order_concentration = 4
    ShapeProperty.boundaryFlux_concentration = 0
    ShapeProperty.boundaryFluxSmooth_concentration = 0
    MassConsistentStabilization.massStreamlineDiffusion = 0
    MassConsistentStabilization.massCrosswindDiffusion = 0
    MassConsistentStabilization.Residual = FullResidual
    AdvancedSettings.ConvectiveTerm = cons
    TransportMechanism.Convection = 0
    cdm1: Fluid "Transport Properties 1" (default) | D_c = 1[m^2/s]
    nflx1: NoFlux (default)
    init1: init "Initial Values 1" (default) | initc = 0
    reac1: Reactions on domains 1 | R_c = b
    conc1: Concentration on boundaries 1-3, 7 | species = 1; c0 = a
    reac2: Reactions on domains 2 | R_c = e
    conc2: Concentration on boundaries 6, 8 | species = 1; c0 = a^2*10
    pac1: PartitionCondition on boundaries 4, 5 | ReverseDirection = 1; K = K

Mesh
  mesh1 "Mesh 1" (physics-controlled)
    size: MeshSizeDefault | hauto = 1

Studies
  std1 "Study 1"
    stat: Stationary (disabled)
    time: Transient "Time Dependent" | tlist = 10

Solver configurations
  sol1 "Solution 1" (study std1)
    v1: Variables "Dependent Variables 1"
    t1: Time "Time-Dependent Solver 1" | tlist = 10; rtol = 0.005; maxorder = 2; stabcntrl = on
      fc1: FullyCoupled
        linsolver = d1
        maxiter = 8
        jtech = once
        stabacc = aacc
        aaccdim = 5
        aaccmix = 0.9
        aaccdelay = 1
        damp = 0.9
      d1: Direct "Direct, concentrations (tds)" | linsolver = pardiso; pivotperturb = 1.0E-13

Datasets
  dset1: Solution | solution = sol1
  dset2: Solution on domains 1 | solution = sol1
  dset3: Solution "Study 1/Solution 1 PArtiotion" on domains 2 | solution = sol1

Plots
  pg1: PlotGroup2D "Concentration (tds)" | data = dset1; title = Residuals; xlabel = x (m); ylabel = y (m)
    surf1: Surface | data = dset2; expr = c-a
    str1: Streamline (disabled) | expr = {tds.tflux_cx, tds.tflux_cy}; pointtype = arrow; arrowlength = logarithmic
    surf2: Surface | data = dset3; expr = c-a^2*10
  pg2: PlotGroup2D "Concentration (tds) 1" | data = dset1; title = Solution; xlabel = x (m); ylabel = y (m)
    surf1: Surface | expr = c_flibe
      hght1: Height "Height Expression 1" (disabled) | expr = c
      sel1: Selection on domains 1
    str1: Streamline | expr = {tds.tflux_cx, tds.tflux_cy}; pointtype = arrow; arrowlength = logarithmic
    surf2: Surface | expr = c_flibe2
      hght1: Height "Height Expression 1" (disabled) | expr = c
      sel1: Selection on domains 2
  pg3: PlotGroup2D "Concentration (tds) 1.1" | data = dset1; title = Flux x direction; xlabel = x (m); ylabel = y (m)
    surf1: Surface | expr = tds.dflux_cx; descr = Diffusive flux, x-component
      hght1: Height "Height Expression 1" (disabled) | expr = c
    str1: Streamline | expr = {tds.tflux_cx, tds.tflux_cy}; pointtype = arrow; arrowlength = logarithmic

Exports
  anim1: Animation | giffilename = C:\Users\Gabriele\Desktop\MMS_Pc.gif
  plot1: Plot | filename = \MS10s.txt