// COMSOL Multiphysics 6.1.0.357 model "TDS_FINALE- Copia.mph"
// TDS Tungsten
// Validation case from Ogorodnikova of a thermal desorption in a tungsten sample. Made for the Titans project. Run study 1 and export results using the Export Flux node
// Outline of the model tree

Parameters
  l = 5E-4[m]
  tf = 4000+trest+100 [s]
  dt1 = 0.5
  dt2 = 100
  trest = 5000
  phi = 1.25E19[1/m^2/s]/N_A_const
  E_k = 0.2[eV]
  Ed = 0.2[eV]
  E1 = 0.834 [eV]
  E2 = 0.959 [eV]
  E3 = 1.496 [eV]
  eta0 = 1E13 [s^-1]
  n1 = 1.364E-3*rho_n
  n2 = 3.629E-4*rho_n
  n3 = 9.743E-2*rho_n
  rho_n = 6.3382E28[m^-3]/N_A_const
  n_solute = 6*rho_n
  x_center = 10E-9 [m]
  width = 2E-9 [m]
  R_imp = 5.6*r[nm]
  r = (1-0.56)/0.5

Functions
  rm2: Ramp | funcname = rm1; location = (4000+trest); slope = 8
  step2: Step | funcname = step1; location = 4000; from = 1; to = 0; smooth = 1
  gp1: GaussianPulse | location = 4.5E-9; sigma = 2.5E-9
  step3: Step "Stepxp" | funcname = stepxp; location = 1E-6; from = 1; to = 0; smooth = 1E-8
  an1: Analytic | expr = 1/(1+exp((x-x_center)/width))
  an2: Analytic | expr = n3/(1+exp((x-x_center)/width))

Variables
  var16 "Variables"
    kt = eta0/n_solute*exp(-E_k/k_B_const/T)
  var17 "Variables monoblock"
    T_imp = 300 [K]
    T = T_imp+rm1(t*1[1/s])[K]
  var18 "Variables Tungsten" on domains 1
    D_W = D0W*exp(-Ed/k_B_const/T)
    D0W = 1.9E-7[m^2/s]
  var21 "Variables trap1"
    pt1 = eta0*exp(-E1/k_B_const/T)
  var22 "Variables trap2"
    pt2 = eta0*exp(-E2/k_B_const/T)
  var23 "trap3"
    pt3 = eta0*exp(-E3/k_B_const/T)

Selections
  sel1: Explicit on all boundaries

Couplings
  aveop3: Average on boundaries 1, 2
  aveop4: Average on domains 1
  aveop5: Average on boundaries 2
  aveop6: Average on boundaries 1
  intop1: Integration on domains 1

Geometry
  geom3 "Geometry 3" (1D, length unit m)
    i1: Interval | coord = {0, l}
    fin: Finalize "Form Union"

Physics
  tds: DilutedSpecies "Transport of Diluted Species" on all domains
    dependent variable cm
    ShapeProperty.order_concentration = 2
    ShapeProperty.boundaryFlux_concentration = 0
    ShapeProperty.boundaryFluxSmooth_concentration = 0
    MassConsistentStabilization.Residual = FullResidual
    cdm1: ConvectionDiffusionMigration "Transport Properties Tungsten" (default)
      minput_temperature = T_imp+rm1(t*1[1/s])[K]
      D_cextr = 0[m^2/s]
      D_cextrdens = 0[m^2/s]
    nflx1: NoFlux (default)
    init1: init "Initial Values 1" (default) | initc = 0
    conc1: Concentration on boundaries 1 | species = 1; c0 = (phi*step1(t*1[1/s])*R_imp)/D_W
    conc2: Concentration on boundaries 2 | species = 1
    reac1: Reactions "Reactions trap" on domains 1 | R_cm = (-ctrapt)
    reac2: Reactions "Reactions trap 2" on domains 1 | R_cm = (-ctrap2t)
    reac3: Reactions "Reactions trap 3" on domains 1 | R_cm = (-ctrap3t)
  c: CoefficientFormPDE on all domains
    dependent variable ctrap
    ShapeProperty.boundaryFlux = 0
    ShapeProperty.boundaryFluxSmooth = 0
    ShapeProperty.valueType = real
    Units.DependentVariableQuantity = concentration
    Units.CustomSourceTermUnit = mol/m^3/s
    cfeq1: CoefficientFormPDE (default) | c = 0; f = (kt*cm*(n1-ctrap)-pt1*ctrap); da = 1
    zflx1: ZeroFluxBoundary "Zero Flux 1" (default)
    init1: init "Initial Values 1" (default)
  c2: CoefficientFormPDE on all domains
    dependent variable ctrap2
    ShapeProperty.boundaryFlux = 0
    ShapeProperty.valueType = real
    Units.DependentVariableQuantity = concentration
    Units.CustomSourceTermUnit = mol/m^3/s
    cfeq1: CoefficientFormPDE (default) | c = 0; f = (kt*cm*(n2-ctrap2)-pt2*ctrap2); da = 1
    zflx1: ZeroFluxBoundary "Zero Flux 1" (default)
    init1: init "Initial Values 1" (default)
  c3: CoefficientFormPDE on all domains
    dependent variable ctrap3
    ShapeProperty.boundaryFlux = 0
    ShapeProperty.boundaryFluxSmooth = 0
    ShapeProperty.valueType = real
    Units.DependentVariableQuantity = concentration
    Units.CustomSourceTermUnit = mol/m^3/s
    cfeq1: CoefficientFormPDE (default) | c = 0; f = (kt*cm*((n3/(1+exp((x-x_center)/width)))-ctrap3)-pt3*ctrap3); da = 1
    zflx1: ZeroFluxBoundary "Zero Flux 1" (default)
    init1: init "Initial Values 1" (default)

Mesh
  mesh3 "Mesh 3"
    size: MeshSizeDefault | custom = on
    edg1: Edge on domains 1
      dis1: Distribution on domains 1
        type = predefined
        elemcount = 1000
        elemratio = 2000
        symmetric = on
        method = geometric

Studies
  std1 "Study 1"
    time: Transient "Time Dependent"
      tlist = range(100,100,8900) range(9000,1,9100)
      initstudy = zero
      initsol = current
      notsol = current
      usestoresel = selection
      storesel = {sel1}

Solver configurations
  sol1 "Solution 1" (study std1)
    v1: Variables "Dependent Variables 1"
    t1: Time "Time-Dependent Solver 1"
      tlist = range(100,100,8900) range(9000,1,9100)
      rtol = 0.005
      atolglobalfactor = 0.0001
      atolmethod = {comp1_cm, scaled, comp1_ctrap, global, comp1_ctrap2, global, comp1_ctrap3, global}
      atolfactor = {comp1_cm, 0.001, comp1_ctrap, 0.1, comp1_ctrap2, 0.1, comp1_ctrap3, 0.1}
      maxorder = 2
      stabcntrl = on
      fc1: FullyCoupled | linsolver = d1; maxiter = 80; damp = 0.9; jtech = once; stabacc = aacc; aaccdim = 5
      d1: Direct

Datasets
  dset1: Solution | solution = sol1

Plots
  pg16: PlotGroup1D "TDS 2" | data = dset1
    ptgr1: PointGraph on boundaries 1
      expr = aveop6(tds.tfluxMag_cm)*N_A_const+aveop5(tds.tfluxMag_cm)*N_A_const
      xdata = expr
      xdataexpr = T
    ptgr2: PointGraph on boundaries 1 | expr = intop1(-ctrapt)*N_A_const; xdata = expr; xdataexpr = T
    ptgr3: PointGraph on boundaries 1 | expr = intop1(-ctrap2t)*N_A_const; xdata = expr; xdataexpr = T
    ptgr4: PointGraph on boundaries 1 | expr = intop1(-ctrap3t)*N_A_const; xdata = expr; xdataexpr = T
    ptgr5: PointGraph on boundaries 1 | expr = intop1(-ctrap3t-ctrap2t-ctrapt)*N_A_const; xdata = expr; xdataexpr = T
  pg3: PlotGroup1D "TDS" | data = dset1
    ptgr1: PointGraph on boundaries 1 | expr = aveop6(tds.tfluxMag_cm)*N_A_const+aveop5(tds.tfluxMag_cm)*N_A_const
    ptgr2: PointGraph on boundaries 1 | expr = intop1(-ctrapt)*N_A_const
    ptgr3: PointGraph on boundaries 1 | expr = intop1(-ctrap2t)*N_A_const
    ptgr4: PointGraph on boundaries 1 | expr = intop1(-ctrap3t)*N_A_const
    ptgr5: PointGraph (disabled) on boundaries 1 | expr = intop1(-ctrap3t-ctrap2t-ctrapt)*N_A_const

Exports
  plot1: Plot "Export Flux"