// COMSOL Multiphysics 6.3.0.290 model "MMS2DtimedepPartition_SievertsHenry.mph"
// Outline of the model tree

Variables
  var1 "Variables 1"
    a = (2+cos(2*pi*x*1[1/m])*cos(2*pi*y*1[1/m]))*t*1[1/s]
    b = 8*pi^2*t*cos(2*pi*x)*cos(2*pi*y) + cos(2*pi*x)*cos(2*pi*y) + 2
    e = 160*pi^2*t^2*(cos(2*pi*x)*cos(2*pi*y) + 2)*cos(2*pi*x)*cos(2*pi*y) - 80*pi^2*t^2*sin(2*pi*x)^2*cos(2*pi*y)^2 - 80*pi^2*t^2*sin(2*pi*y)^2*cos(2*pi*x)^2 + 20*t*(cos(2*pi*x)*cos(2*pi*y) + 2)^2
    c_t_in = 1E-3
    n1 = 1.71E26[1/m^3]/N_A_const  // Ok
    E1k = Ed  // Ok
    k1 = 1.94e-17[m^3/s]*N_A_const/(3)^0.5  // Ok
    p1 = 1E13 [1/s]/(3)^0.5  // Ok
    E1p = 1.5[eV]  // Ok
    Ed = 0.16[eV]  // Ok
    kt1 = k1*exp(-E1k/(k_B_const*T))  // Ok
    pt1 = p1*exp(-E1p/(k_B_const*T))  // Ok
    T = 1000 [K]
    ct_an = kt1*cm_an*n1/(kt1*cm_an+pt1)+(c_t_in-kt1*cm_an*n1/(kt1*cm_an+pt1))*exp(-(kt1*cm_an+pt1)*t)
    ct_an_2 = kt1*cm_an_2*n1/(kt1*cm_an_2+pt1)+(c_t_in-kt1*cm_an_2*n1/(kt1*cm_an_2+pt1))*exp(-(kt1*cm_an_2+pt1)*t)
    cm_an = a *1[mol/m^3]
    cm_an_2 = a^2*10 *1[mol/m^3]
  var2 "Variables 2" on domains 1
    c_flibe = c
  var3 "Variables 3" on boundaries 4, 5
    K = 10*c_flibe
  var4 "Variables 4" on domains 2
    c_flibe2 = c

Selections
  sel1: Explicit on points 3, 4, 7-9

Geometry
  geom1 "Geometry 1" (2D, length unit m)
    sq1: Square | base = center
    sq2: Square | size = 0.5
    pt1: Point | p = {-0.4, 0.2}
    pt2: Point | p = {0.28, 0.36}
    pt3: Point | p = {-0.18, -0.45}
    pt4: Point | p = {0.48, -0.05}
    pt5: Point | p = {0.08, -0.05}
    fin: Finalize "Form Union"

Physics
  tds: DilutedSpecies "Transport of Diluted Species" on all domains
    dependent variable c
    ShapeProperty.order_concentration = 2
    ShapeProperty.boundaryFlux_concentration = 0
    ShapeProperty.boundaryFluxSmooth_concentration = 0
    MassConsistentStabilization.massStreamlineDiffusion = 0
    MassConsistentStabilization.massCrosswindDiffusion = 0
    MassConsistentStabilization.Residual = FullResidual
    AdvancedSettings.ConvectiveTerm = cons
    TransportMechanism.Convection = 0
    cdm1: Fluid "Transport Properties 1" (default) | D_c = 1[m^2/s]
    nflx1: NoFlux (default)
    init1: init "Initial Values 1" (default) | initc = 0
    reac1: Reactions on domains 1 | R_c = b
    conc1: Concentration on boundaries 1-3, 7 | species = 1; c0 = cm_an
    reac2: Reactions on domains 2 | R_c = e
    conc2: Concentration on boundaries 6, 8 | species = 1; c0 = cm_an_2
    pac1: PartitionCondition on boundaries 4, 5 | ReverseDirection = 1; K = K
    reac3: Reactions (disabled) on domains 1 | R_c = -ctrapt+kt1*(cm_an)*(n1-ct_an)-pt1*ct_an
    reac4: Reactions (disabled) on domains 2 | R_c = -ctrapt+kt1*(cm_an_2)*(n1-ct_an_2)-pt1*ct_an_2
  c: CoefficientFormPDE on domains 1, 2
    dependent variable ctrap
    ShapeProperty.shapeFunctionType = shdisc
    ShapeProperty.order = 2
    ShapeProperty.boundaryFlux = 0
    ShapeProperty.boundaryFluxSmooth = 0
    ShapeProperty.valueType = real
    EquationForm.form = Automatic
    Units.DependentVariableQuantity = none
    Units.CustomDependentVariableUnit = mol/m^3
    Units.CustomSourceTermUnit = mol/m^3/s
    cfeq1: CoefficientFormPDE (default) | c = {0, 0, 0, 0}; f = kt1*(c)*(n1-ctrap)-pt1*ctrap; da = 1
    zflx1: ZeroFluxBoundary "Zero Flux 1" (default)
    init1: init "Initial Values 1" (default)
      ctrap = c_t_in
      ctrapt = kt1*a*n1/(kt1*a+pt1)+(c_t_in-kt1*a*n1/(kt1*a+pt1))*exp(-(kt1*a+pt1)*t)
    init2: init "Initial Values 2" on domains 2
      ctrap = c_t_in
      ctrapt = kt1*cm_an_2*n1/(kt1*cm_an_2+pt1)+(c_t_in-kt1*cm_an_2*n1/(kt1*cm_an_2+pt1))*exp(-(kt1*cm_an_2+pt1)*t)

Mesh
  mesh1 "Mesh 1"
    size: MeshSizeDefault | hauto = 4
    fq1: FreeQuad on remaining entities
      size1: Size on entire geometry | hauto = 3

Studies
  std1 "Study 1"
    stat: Stationary (disabled)
    time: Transient "Time Dependent"
      tlist = 0, 10^{range(-6,0.1,2)}
      rtol = 0.005
      outputmap = {tds, selection, c, selection, frame:spatial1, physics, frame:material1, physics}
      outputselectionmap = {tds, sel1, c, sel1, frame:spatial1, , frame:material1, }

Solver configurations
  sol1 "Solution 1" (study std1)
    v1: Variables "Dependent Variables 1"
    t1: Time "Time-Dependent Solver 1"
      tlist = 0, 10^{range(-6,0.1,2)}
      rtol = 0.005
      atolglobalfactor = 0.00001
      atolmethod = {comp1_c, global, comp1_ctrap, scaled}
      tstepsbdf = intermediate
      initialstepbdf = 1E-8
      maxstepexpressionbdf = 1E-5
      maxorder = 2
      eventtol = 0.0001
      stabcntrl = on
      tstepsrk34 = intermediate
      fc1: FullyCoupled
        linsolver = d1
        dtech = hnlin
        maxiter = 8
        termonres = both
        backtrackonce = on
        jtech = onevery
        adapttol = on
        aaccdim = 5
        aaccmix = 0.9
        damp = 0.9
      d1: Direct "Direct (Merged)" | linsolver = pardiso
  sol2 "transient on points final" (study std1)

Datasets
  dset1: Solution | solution = sol1
  dset2: Solution on domains 1 | solution = sol1
  dset3: Solution "Study 1/Solution 1 PArtiotion" on domains 2 | solution = sol1
  dset4: Solution | solution = sol2

Plots
  pg1: PlotGroup2D "Concentration (tds)" | data = dset1; title = Residuals; xlabel = x (m); ylabel = y (m)
    surf1: Surface | data = dset2; expr = c-a
    str1: Streamline (disabled) | expr = {tds.tflux_cx, tds.tflux_cy}; pointtype = arrow; arrowlength = logarithmic
    surf2: Surface | data = dset3; expr = c-a^2*10
  pg2: PlotGroup2D "Concentration (tds) 1" | data = dset1; title = Solution; xlabel = x (m); ylabel = y (m)
    surf1: Surface | expr = c_flibe
      hght1: Height "Height Expression 1" (disabled) | expr = c
      sel1: Selection on domains 1
    str1: Streamline | expr = {tds.tflux_cx, tds.tflux_cy}; pointtype = arrow; arrowlength = logarithmic
    surf2: Surface | expr = c_flibe2
      hght1: Height "Height Expression 1" (disabled) | expr = c
      sel1: Selection on domains 2
  pg3: PlotGroup2D "Concentration (tds) 1.1" | data = dset1; title = Flux x direction; xlabel = x (m); ylabel = y (m)
    surf1: Surface | expr = tds.dflux_cx; descr = Diffusive flux, x-component
      hght1: Height "Height Expression 1" (disabled) | expr = c
    str1: Streamline | expr = {tds.tflux_cx, tds.tflux_cy}; pointtype = arrow; arrowlength = logarithmic
  pg4: PlotGroup2D "2D Plot Group 4" | data = dset1
    surf1: Surface
      expr = (ctrap-(kt1*a^2*10*n1/(kt1*a^2*10+pt1)+(c_t_in-kt1*a^2*10*n1/(kt1*a^2*10+pt1))*exp(-(kt1*a^2*10+pt1)*t)))/ctrap
      sel1: Selection on domains 2
    surf2: Surface | expr = (ctrap-(kt1*a*n1/(kt1*a+pt1)+(c_t_in-kt1*a*n1/(kt1*a+pt1))*exp(-(kt1*a+pt1)*t)))/ctrap
      sel1: Selection on domains 1
  pg5: PlotGroup2D "2D Plot Group 5" | data = dset1
    surf1: Surface | expr = ctrap
      sel1: Selection (disabled) on domains 2
    surf2: Surface | expr = ct_an
      sel1: Selection (disabled) on domains 1
    surf3: Surface | expr = ct_an_2
      sel1: Selection (disabled) on domains 2
  pg6: PlotGroup1D "1D Plot Group 6" | data = dset2
    ptgr1: PointGraph on points 3, 4, 7, 9 | expr = abs(ctrap-ct_an)/ctrap*100
    ptgr2: PointGraph on points 8 | expr = abs(ctrap-ct_an_2)/ctrap*100
  pg7: PlotGroup1D "1D Plot Group 7" | data = dset2
    ptgr1: PointGraph on points 3, 4, 7-9 | expr = ctrap
    ptgr2: PointGraph on points 8 | expr = ct_an_2
    ptgr3: PointGraph on points 3, 4, 7, 9 | expr = ct_an
  pg8: PlotGroup1D "1D Plot Group 8" | data = dset2
    ptgr1: PointGraph on points 3, 4, 7, 9 | expr = -ctrapt-(kt1*(cm_an_2)*(n1-ct_an_2)-pt1*ct_an_2)
    ptgr2: PointGraph (disabled) on points 8 | expr = ct_an_2
    ptgr3: PointGraph (disabled) on points 3, 4, 7, 9 | expr = ct_an

Exports
  anim1: Animation | giffilename = C:\Users\Gabriele\Desktop\MMS_Pc.gif
  plot1: Plot | filename = \MS10s.txt
  plot2: Plot
    filename = C:\Users\Gabriele\OneDrive - Politecnico di Torino\Progetti\Titans\Titans_TT_codecomparison\MMS\MMS_traps\Henri\ctrap_henry_timedep_1.txt
    multiplecurves = ascolumns
  plot3: Plot
    filename = C:\Users\Gabriele\OneDrive - Politecnico di Torino\Progetti\Titans\Titans_TT_codecomparison\MMS\MMS_traps\Henri\ctrap_an2_henry_timedep.txt
    multiplecurves = ascolumns
  plot4: Plot
    filename = C:\Users\Gabriele\OneDrive - Politecnico di Torino\Progetti\Titans\Titans_TT_codecomparison\MMS\MMS_traps\Henri\ctrap_an_henry_timedep.txt
    multiplecurves = ascolumns
  plot5: Plot
    filename = C:\Users\Gabriele\OneDrive - Politecnico di Torino\Progetti\Titans\Titans_TT_codecomparison\MMS\MMS_traps\Henri\ctrap_henry_at01.txt
  plot6: Plot
    filename = C:\Users\Gabriele\OneDrive - Politecnico di Torino\Progetti\Titans\Titans_TT_codecomparison\MMS\MMS_traps\Henri\ctrap_an1_henry_at01.txt
  plot7: Plot
    filename = C:\Users\Gabriele\OneDrive - Politecnico di Torino\Progetti\Titans\Titans_TT_codecomparison\MMS\MMS_traps\Henri\ctrap_an2_henry_at01.txt