// COMSOL Multiphysics 6.3.0.290 model "MMS2DtimedepPartition_onlySieverts.mph"
// Outline of the model tree

Variables
  var1 "Variables 1"
    a = (1+cos(2*pi*x)*cos(2*pi*y))*t
    b = 8*pi^2*t*cos(2*pi*x)*cos(2*pi*y) + cos(2*pi*x)*cos(2*pi*y) + 1
    e = 80*pi^2*t*cos(2*pi*x)*cos(2*pi*y) + 10*cos(2*pi*x)*cos(2*pi*y) + 10
    K = 10
    cm_an = a
    cm_an_2 = a*K
    c_t_in = 0
    n1 = 1.71E26[1/m^3]/N_A_const  // Ok
    E1k = Ed  // Ok
    k1 = 1.94e-17[m^3/s]*N_A_const/(3)^0.5  // Ok
    p1 = 1E13 [1/s]/(3)^0.5  // Ok
    E1p = 1.5[eV]  // Ok
    Ed = 0.16[eV]  // Ok
    kt1 = k1*exp(-E1k/(k_B_const*T))  // Ok
    pt1 = p1*exp(-E1p/(k_B_const*T))  // Ok
    T = 1000 [K]
    ct_an = kt1*cm_an*n1/(kt1*cm_an+pt1)+(c_t_in-kt1*cm_an*n1/(kt1*cm_an+pt1))*exp(-(kt1*cm_an+pt1)*t)
    ct_an_2 = kt1*cm_an_2*n1/(kt1*cm_an_2+pt1)+(c_t_in-kt1*cm_an_2*n1/(kt1*cm_an_2+pt1))*exp(-(kt1*cm_an_2+pt1)*t)
  var2 "Variables 2" on domains 1
    c1 = c
  var3 "Variables 3" on domains 2
    c2 = c

Selections
  sel1: Explicit on points 3-5, 8, 9

Geometry
  geom1 "Geometry 1" (2D, length unit m)
    sq1: Square | base = center
    sq2: Square | size = 0.5
    pt1: Point | p = {-0.4, 0.2}
    pt2: Point | p = {0.28, 0.36}
    pt3: Point | p = {-0.18, -0.45}
    pt4: Point | p = {-0.48, -0.08}
    pt5: Point | p = {0.08, -0.05}
    fin: Finalize "Form Union"

Physics
  tds: DilutedSpecies "Transport of Diluted Species" on all domains
    dependent variable c
    ShapeProperty.order_concentration = 3
    ShapeProperty.boundaryFlux_concentration = 0
    ShapeProperty.boundaryFluxSmooth_concentration = 0
    MassConsistentStabilization.massStreamlineDiffusion = 0
    MassConsistentStabilization.massCrosswindDiffusion = 0
    MassConsistentStabilization.Residual = FullResidual
    AdvancedSettings.ConvectiveTerm = cons
    TransportMechanism.Convection = 0
    cdm1: Fluid "Transport Properties 1" (default) | D_c = 1[m^2/s]
    nflx1: NoFlux (default)
    init1: init "Initial Values 1" (default) | initc = 0
    reac1: Reactions on domains 1 | R_c = b
    conc1: Concentration on boundaries 1-3, 7 | species = 1; c0 = a
    reac2: Reactions on domains 2 | R_c = e
    conc2: Concentration on boundaries 6, 8 | species = 1; c0 = a*K
    pac1: PartitionCondition on boundaries 4, 5 | ReverseDirection = 1; K = 10
    reac3: Reactions (disabled) on domains 1 | R_c = -ctrapt+kt1*(cm_an)*(n1-ct_an)-pt1*ct_an
    reac4: Reactions (disabled) on domains 2 | R_c = -ctrapt+kt1*(cm_an_2)*(n1-ct_an_2)-pt1*ct_an_2
  c: CoefficientFormPDE on domains 1, 2
    dependent variable ctrap
    ShapeProperty.shapeFunctionType = shdisc
    ShapeProperty.order = 2
    ShapeProperty.boundaryFlux = 0
    ShapeProperty.boundaryFluxSmooth = 0
    ShapeProperty.valueType = real
    EquationForm.form = Automatic
    Units.DependentVariableQuantity = none
    Units.CustomDependentVariableUnit = mol/m^3
    Units.CustomSourceTermUnit = mol/m^3/s
    cfeq1: CoefficientFormPDE (default) | c = {0, 0, 0, 0}; f = kt1*(c)*(n1-ctrap)-pt1*ctrap; da = 1
    zflx1: ZeroFluxBoundary "Zero Flux 1" (default)
    init1: init "Initial Values 1" (default)
      ctrap = c_t_in
      ctrapt = kt1*a*n1/(kt1*a+pt1)+(c_t_in-kt1*a*n1/(kt1*a+pt1))*exp(-(kt1*a+pt1)*t)
    init2: init "Initial Values 2" on domains 2
      ctrap = c_t_in
      ctrapt = kt1*cm_an_2*n1/(kt1*cm_an_2+pt1)+(c_t_in-kt1*cm_an_2*n1/(kt1*cm_an_2+pt1))*exp(-(kt1*cm_an_2+pt1)*t)
    init3: init "Initial Values 3" (disabled) on all domains | ctrap = c_t_in; ctrapt = 0
    init4: init "Initial Values 4" (disabled) on domains 2 | ctrap = c_t_in; ctrapt = 0

Mesh
  mesh1 "Mesh 1" (physics-controlled)

Studies
  std1 "Study 1"
    stat: Stationary (disabled)
    time: Transient "Time Dependent"
      tlist = 0, 10^{range(-4,0.1,4)}
      outputmap = {tds, selection, c, selection, frame:spatial1, physics, frame:material1, physics}
      outputselectionmap = {tds, sel1, c, sel1, frame:spatial1, , frame:material1, }

Solver configurations
  sol1 "Solution 1" (study std1)
    v1: Variables "Dependent Variables 1"
    t1: Time "Time-Dependent Solver 1"
      tlist = 0, 10^{range(-4,0.1,4)}
      rtol = 0.005
      tstepsbdf = intermediate
      initialstepbdf = 1E-8
      maxstepbdf = 1E-5
      minorder = 2
      eventtol = 0.0001
      stabcntrl = on
      fc1: FullyCoupled
        linsolver = d1
        maxiter = 8
        jtech = once
        stabacc = aacc
        aaccdim = 5
        aaccmix = 0.9
        damp = 0.9
      d1: Direct "Direct (Merged)" | linsolver = pardiso
  sol3 "Solution 1 - Copy 2" (study std1)
  sol4 "solution 2D on moments" (study std1)

Datasets
  dset1: Solution | solution = sol1
  dset2: Solution on domains 1 | solution = sol1
  dset3: Solution "Study 1/Solution 1 PArtiotion" on domains 2 | solution = sol1
  dset7: Solution "transient solution on points final" | solution = sol3
  dset8: Solution | solution = sol4

Tables
  mrkvl1: Table "Marker Points"
    // Marker
    X | Y | Dependent variable ctrap (mol/m^3)
    0 | 0.5 | -4.14765e-07
    0.5 | 0.5 | 5.9199

Plots
  pg1: PlotGroup2D "Concentration (tds)" | data = dset8; title = Solution; xlabel = x (m); ylabel = y (m)
    surf1: Surface | data = dset8; expr = c
    str1: Streamline | expr = {tds.tflux_cx, tds.tflux_cy}; pointtype = arrow; arrowlength = logarithmic
    surf2: Surface | data = dset3; expr = c
  pg2: PlotGroup2D "Concentration (tds) 1" | data = dset8; title = Flux, x direction; xlabel = x (m); ylabel = y (m)
    surf1: Surface (disabled) | expr = c
      hght1: Height "Height Expression 1" | expr = c
    str1: Streamline (disabled) | expr = {tds.tflux_cx, tds.tflux_cy}; pointtype = arrow; arrowlength = logarithmic
    surf2: Surface | expr = abs(c1-cm_an)/c1
      sel1: Selection on domains 1
    surf3: Surface | expr = abs(c2-cm_an_2)/c2
      sel1: Selection on domains 2
  pg3: PlotGroup1D "1D Plot Group 3" | data = dset1
    ptgr1: PointGraph on points 3-5, 8 | expr = ctrap
    ptgr2: PointGraph on points 3-5, 8 | expr = ct_an
    ptgr3: PointGraph on points 9 | expr = ct_an_2
    ptgr4: PointGraph on points 9 | expr = ctrap
  pg4: PlotGroup1D "1D Plot Group 4" | data = dset7
    ptgr1: PointGraph on points 9 | expr = abs(ct_an_2-ctrap)/ctrap*100
    ptgr2: PointGraph on points 3-5, 8 | expr = abs(ct_an-ctrap)/ctrap*100
  pg5: PlotGroup2D "Concentration (tds) 1.1" | data = dset8; title = Flux, x direction; xlabel = x (m); ylabel = y (m)
    surf1: Surface (disabled) | expr = c
      hght1: Height "Height Expression 1" | expr = c
    str1: Streamline (disabled) | expr = {tds.tflux_cx, tds.tflux_cy}; pointtype = arrow; arrowlength = logarithmic
    surf2: Surface | expr = ctrap-ct_an
      sel1: Selection on domains 1
      mrkr1: Marker (disabled) | table = mrkvl1
    surf3: Surface (disabled)
      sel1: Selection on domains 2
    surf4: Surface | expr = ctrap-ct_an_2
      sel1: Selection on domains 2
      mrkr1: Marker (disabled)
  pg6: PlotGroup2D "Concentration (tds) 2" | data = dset8; title = Solution; xlabel = x (m); ylabel = y (m)
    surf1: Surface | data = dset8; expr = ct_an
    str1: Streamline | expr = {tds.tflux_cx, tds.tflux_cy}; pointtype = arrow; arrowlength = logarithmic
    surf2: Surface | data = dset8; expr = ct_an_2

Exports
  anim1: Animation | giffilename = C:\Users\Gabriele\Desktop\MMS_Pc.gif
  anim2: Animation | target = player; synchronize = off
  plot1: Plot | filename = \Ver10s.txt
  plot2: Plot
    filename = C:\Users\Gabriele\OneDrive - Politecnico di Torino\Progetti\Titans\Titans_TT_codecomparison\MMS\MMS_traps\Sieverts\ctrap_sieverts_timedep_1.txt
    multiplecurves = ascolumns
  plot3: Plot
    filename = C:\Users\Gabriele\OneDrive - Politecnico di Torino\Progetti\Titans\Titans_TT_codecomparison\MMS\MMS_traps\Sieverts\ctrap_sieverts_timedep_2.txt
    multiplecurves = ascolumns
  plot4: Plot
    filename = C:\Users\Gabriele\OneDrive - Politecnico di Torino\Progetti\Titans\Titans_TT_codecomparison\MMS\MMS_traps\ctrap_sieverts_at10000.txt
  plot5: Plot
    filename = C:\Users\Gabriele\OneDrive - Politecnico di Torino\Progetti\Titans\Titans_TT_codecomparison\MMS\MMS_traps\ctrap_an1_sieverts_at10000.txt
  plot6: Plot
    filename = C:\Users\Gabriele\OneDrive - Politecnico di Torino\Progetti\Titans\Titans_TT_codecomparison\MMS\MMS_traps\ctrap_an2_sieverts_at10000.txt
  plot7: Plot
    filename = C:\Users\Gabriele\OneDrive - Politecnico di Torino\Progetti\Titans\Titans_TT_codecomparison\MMS\MMS_traps\ctrap_an_sieverts_timedep.txt
    multiplecurves = ascolumns
  plot8: Plot
    filename = C:\Users\Gabriele\OneDrive - Politecnico di Torino\Progetti\Titans\Titans_TT_codecomparison\MMS\MMS_traps\ctrap_an2_sieverts_timedep.txt